M_max := q*L^2/8
# A synthetic sheet
# Inline math: η > 0 here.
ORIGIN ≡ 1
f(x) :=
    -x if x < 0
    x otherwise
K := [1, 2; 3, 4]
K[1, 2] = 2
s := sum(k^2, k = 1 .. 10)  # disabled
θ*_Ω.fo :=
    try
        1/0
    on error
        -1
p :=
    s ← 0
    for i ∈ 0, 2 .. 10
        s ← s + i
    s
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